// COMSOL Multiphysics 5.2.0.166 model "Generator_2D.mph"
// Outline of the model tree

Parameters
  L = 0.4[m]  // Lenght of generator
  rpm = 60[1/min]  // Rotational speed of rotor

Variables
  var1 "Variables 1"
    A = comp1.intop3(1)  // Cross - Sectional area winding
    Vi = comp1.intop1(L*rmm.Ez/A) - comp1.intop2(L*rmm.Ez/A)

Couplings
  intop1: Integration on domains 5-8, 13-16
  intop2: Integration on domains 3, 4, 9-12, 17, 18
  intop3: Integration on domains 8

Pairs
  ap1: Identity "Identity Pair 1" | source: boundaries 32, 33, 63, 64; destination: boundaries 121, 122, 138, 139

Coordinate systems
  sys2: Cylindrical "Cylindrical System 2"

Geometry
  geom1 "Geometry 1" (2D, length unit m)
    imp1: Import | filename = D:\2Behkaman_Projects\Comsol_Project\Comsol_Projects\generator_2d.mphbin
    fin: Finalize "Form Assembly" | action = assembly

Materials
  mat1: Common "Air" on all domains
    def "Basic"
      relpermeability = 1
      relpermittivity = 1
      dynamicviscosity = eta(T[1/K])[Pa*s]
      ratioofspecificheat = 1.4
      electricconductivity = 0[S/m]
      heatcapacity = Cp(T[1/K])[J/(kg*K)]
      density = rho(pA[1/Pa],T[1/K])[kg/m^3]
      thermalconductivity = k(T[1/K])[W/(m*K)]
      soundspeed = cs(T[1/K])[m/s]
      eta: Piecewise | arg = T; extrap = constant; pieces = {200.0, 1600.0, -8.38278E-7+8.35717342E-8*T^1-7.69429583E-11*T^2+4.6437266E-14*T^3-1.06585607E-17*T^4}
      Cp: Piecewise | arg = T; extrap = constant; pieces = {200.0, 1600.0, 1047.63657-0.372589265*T^1+9.45304214E-4*T^2-6.02409443E-7*T^3+1.2858961E-10*T^4}
      rho: Analytic | expr = pA*0.02897/8.314/T; args = {pA, T}; dermethod = manual; argders = {{pA, d(pA*0.02897/8.314/T,pA)}, {T, d(pA*0.02897/8.314/T,T)}}
      k: Piecewise | arg = T; extrap = constant; pieces = {200.0, 1600.0, -0.00227583562+1.15480022E-4*T^1-7.90252856E-8*T^2+4.11702505E-11*T^3-7.43864331E-15*T^4}
      cs: Analytic | expr = sqrt(1.4*287*T); args = T; dermethod = manual; argders = {T, d(sqrt(1.4*287*T),T)}
    RefractiveIndex
      n = 1
      ki = 0
  mat2: Common "Soft Iron (without losses)" on domains 2, 28
    def "Basic"
      electricconductivity = 0[S/m]
      relpermittivity = 1
    BHCurve
      normB = BH(normH[m/A])[T]
      normH = sqrt(H1^2+H2^2+H3^2)
      BH: Interpolation
        source = table
        table = {{0, 0}, {663.146, 1}, {1067.5, 1.1}, {1705.23, 1.2}, {2463.11, 1.3}, {3841.67, 1.4}, {5425.74, 1.5}, {7957.75, 1.6}, {12298.3, 1.7}, {20462.8, 1.8}, {32169.6, 1.9}, {61213.4, 2.0}, {111408, 2.1}, {175070, 2.2}, {261469, 2.3}, {318310, 2.4}}
        interp = linear
        extrap = linear
    HBCurve
      normH = HB(normB[1/T])[A/m]
      normB = sqrt(B1^2+B2^2+B3^2)
      HB: Interpolation
        source = table
        table = {{0, 0}, {1, 663.146}, {1.1, 1067.5}, {1.2, 1705.23}, {1.3, 2463.11}, {1.4, 3841.67}, {1.5, 5425.74}, {1.6, 7957.75}, {1.7, 12298.3}, {1.8, 20462.8}, {1.9, 32169.6}, {2.0, 61213.4}, {2.1, 111408}, {2.2, 175070}, {2.3, 261469}, {2.4, 318310}}
        interp = linear
        extrap = linear
    EffectiveBHCurve
      normBeff = BHeff(normHeff[m/A])[T]
      normHeff = sqrt(realdot(H1,H1)+realdot(H2,H2)+realdot(H3,H3))
      BHeff: Interpolation
        source = table
        table = 
          {0, 0}
          {663.146, 0.515319470797}
          {1067.5, 0.829536082667}
          {1705.23, 1.32510521241}
          {2463.11, 1.91404086237}
          {3841.67, 2.57920968045}
          {5425.74, 2.83339604721}
          {7957.75, 3.12897627654}
          {12298.3, 3.44497898385}
          {20462.8, 3.77984140944}
          {32169.6, 4.05829078646}
          {61213.4, 4.42072473626}
          {111408, 4.72173321512}
          {175070, 4.94154751401}
          {261469, 5.14442322648}
          {318310, 5.25316413139}
        interp = linear
        extrap = linear
    EffectiveHBCurve
      normHeff = HBeff(normBeff[1/T])[A/m]
      normBeff = sqrt(realdot(B1,B1)+realdot(B2,B2)+realdot(B3,B3))
      HBeff: Interpolation
        source = table
        table = 
          {0, 0}
          {0.515319470797, 663.146}
          {0.829536082667, 1067.5}
          {1.32510521241, 1705.23}
          {1.91404086237, 2463.11}
          {2.57920968045, 3841.67}
          {2.83339604721, 5425.74}
          {3.12897627654, 7957.75}
          {3.44497898385, 12298.3}
          {3.77984140944, 20462.8}
          {4.05829078646, 32169.6}
          {4.42072473626, 61213.4}
          {4.72173321512, 111408}
          {4.94154751401, 175070}
          {5.14442322648, 261469}
          {5.25316413139, 318310}
        interp = linear
        extrap = linear

Physics
  rmm: RotatingMachineryMagnetic on all domains
    dependent variable A = {Ax, Ay, Az}
    etf1: ElectricFieldTransformation (default)
    al1: AmperesLaw "Ampère's Law 1" (default)
    mxb1: MixedFormulationBoundary (default)
    mi1: MagneticInsulation (default)
    init1: init "Initial Values 1" (default)
    prv1: PrescribedRotationalVelocity on domains 19-28 | rps = rpm
    al2: AmperesLaw "New label" on domains 20, 23, 24, 27
      ConstitutiveRelationH = RemanentFluxDensity
      Br = {0.84[T], 0, 0}
      coordinateSystem = sys2
    al3: AmperesLaw "New label2" on domains 21, 22, 25, 26
      ConstitutiveRelationH = RemanentFluxDensity
      Br = {-0.84[T], 0, 0}
      coordinateSystem = sys2
    al4: AmperesLaw "New label3" on domains 2, 28 | ConstitutiveRelationH = HBCurve
    cont1: Continuity on boundaries 32, 33, 63, 64, 121, 122, 138, 139 | pairs = ap1
      mi1: MagneticInsulation (default)

Mesh
  mesh1 "Mesh 1"
    size: MeshSizeDefault | hnarrow = 2; hauto = 3; custom = on
    ftri1: FreeTri "Free Triangular 1" on remaining entities

Studies
  std1 "Study 1"
    stat: Stationary
    time: Transient "Time Dependent" | tlist = range(0,0.1,0.25)

Solver configurations
  sol1 "Solution 1" (study std1)
    v1: Variables "Dependent Variables 1"
    s1: Stationary "Stationary Solver 1"
      dDef: Direct
      fc1: FullyCoupled | linsolver = dDef
    su1: StoreSolution
    v2: Variables "Dependent Variables 2" | initmethod = sol; notsolmethod = sol
    t1: Time "Time-Dependent Solver 1"
      tlist = range(0,0.1,0.25)
      rtol = 0.01
      atolglobalmethod = scaled
      atolglobal = 0.001
      maxorder = 5
      minorder = 1
      rhoinf = 0.75
      dDef: Direct
      fc1: FullyCoupled
        linsolver = dDef
        dtech = const
        initstep = 1
        minstep = 1.0E-4
        rstep = 10
        useminsteprecovery = auto
        minsteprecovery = 0.75
        ntermauto = tol
        maxiter = 7
        ntolfact = 1e-3
        niter = 1
        damp = 1
        jtech = onevery
        ntermconst = tol
        initsteph = 1.0E-4
        minsteph = 1.0E-8
  sol2 "Solution Store 1" (study std1)

Datasets
  dset1: Solution | solution = sol1
  dset2: Solution | solution = sol2

Plots
  pg1: PlotGroup2D "Magnetic Flux Density (rmm)" | data = dset1
    surf1: Surface | expr = rmm.normB